// Place holder for the environment, as in the AMMR human template.
// The bench, the pelvic belt, the thigh strap and the floor are not drawn. Their work is done by the driver reactions in JointsAndDrivers.any.
// (The group's SeatedKneeExtMVIC draws a table and a floor at heights read from the computed posture; those depend on the size of the subject.)
AnyFolder Environment =
{
};
